OpenVSP model (file version 5), 14 components.
Geometry view with OpenVSP parameter names; values to 6 digits, angles in degrees, lengths in the model's unit.
Overall bounding box: X_Min=0 X_Len=49.25 Y_Min=-19.86 Y_Len=39.72 Z_Min=-4.41621 Z_Len=7.57989

Fuselage "Fuselage"
  location (X Y Z) 3.93443 0 0.57377, rotation 0 0 0
  bounding box size 36.4286 4.86384 4.86384
  Design: Length=36.4286
  cross sections:
    n  XLocPercent  YLocPercent  ZLocPercent  shape
    0  0            0            0            point
    1  0.375        0            0            circle Circle_Diameter=3.25
    2  0.458376     0            0            as above
    3  1            0            0            point

Wing "Main Wing"
  location (X Y Z) 12.75 0 0.367347, rotation 0 0 0
  symmetric about XZ
  bounding box size 36.5 39.72 0.912968
  totals: TotalSpan=39.72 TotalProjectedSpan=39.72 TotalChord=18.0625 TotalArea=854.99 TotalAR=1.84526 MAC=24.7296
  root: chord 36.5, twist 0, NACA 64-series A=1 IdealCl=0 ThickChord=0.025
  sections:
    n  Span  Root_Chord  Tip_Chord  Area     Sweep  Sweep_Location  Dihedral  Twist  Twist_Location  tip airfoil
    1  5     36.5        26.5       157.5    48     0               0         0      0               as above
    2  4.7   26.5        24         118.675  48     0               0         0      0.25            as above
    3  3.82  24          17.5       79.265   48     0               0         0      0.25            as above
    4  2.82  17.5        12.5       42.3     48     0               0         0      0.25            as above
    5  2.2   12.5        7.5        22       48     0               0         0      0.25            as above
    6  1.32  7.5         4.25       7.755    48     0               0         0      0.25            as above
  SS_Control "SS_CONT_0": UStart=0.285 UEnd=0.4285 Length_C_Start=0.165 Length_C_End=0.165 Length_Start=4.257 Length_End=3.50097 LE_Flag=0 Surf_Type=2
  SS_Control "SS_CONT_1": UStart=0.4285 UEnd=0.5715 Length_C_Start=0.16 Length_C_End=0.16 Length_Start=3.39488 Length_End=2.3424 LE_Flag=0 Surf_Type=2
  SS_Control "SS_CONT_2": UStart=0.5715 UEnd=0.7142 Length_C_Start=0.15 Length_C_End=0.15 Length_Start=2.196 Length_End=1.3398 LE_Flag=0 Surf_Type=2

Pod "Canopy"
  location (X Y Z) 7.5 0 1.38, rotation 0 -4.02174 0
  bounding box size 7.70327 2.51515 3.03816
  Design: FineRatio=6 Length=7.54545

Stack "Right Air Intake"
  location (X Y Z) 22 3.25 -0.68, rotation 0 0 0
  bounding box size 18.5 3.97349 2.00954
  cross sections:
    n  XDelta  YDelta  ZDelta  shape
    0  0       0       0       edit curve Width=3.5 Height=2 AbsoluteFlag=0 SymType=0 linear points (X Y): 0.499315 0.489041, 0.281507 0.0123288, 0 -0.5, -0.491096 -0.480822, -0.495205 0.0123288, -0.491096 0.480822, 0 0.5, 0.5 0.5, 0.499315 0.489041
    1  18.5    0       0       edit curve Width=3.71344 Height=2 AbsoluteFlag=0 SymType=0 linear points (X Y): 0.34823 0.498174, 0.176969 0.00353315, 0 -0.5, -0.599413 -0.505241, -0.599413 0.0105995, -0.595607 0.498174, -0.150329 0.498174, 0.0970478 0.498174, 0.34823 0.498174

Stack "Left Air Intake"
  location (X Y Z) 22 -3.25 -0.68, rotation 0 0 0
  bounding box size 18.5 4.01061 2.00676
  cross sections:
    n  XDelta  YDelta  ZDelta  shape
    0  0       0       0       edit curve Width=3.5 Height=2 AbsoluteFlag=0 SymType=0 linear points (X Y): 0.5 0, 0.5 -0.5, 0 -0.5, -0.25274 -0.0123288, -0.507534 0.513699, -0.5 0.5, 0 0.5, 0.5 0.5, 0.5 0
    1  18.5    0       0       edit curve Width=3.5 Height=2 AbsoluteFlag=0 SymType=0 linear points (X Y): 0.649596 0.00359787, 0.643151 -0.50024, 0 -0.5, -0.174658 -0.00359589, -0.343151 0.492637, -0.125342 0.493526, 0.141781 0.493526, 0.639041 0.493526, 0.649596 0.00359787

Stack "Engine"
  location (X Y Z) 32.4918 -2.15 -0.05, rotation 0 0 0
  symmetric about XZ
  bounding box size 12.833 9.11145 4.81145
  cross sections:
    n  XDelta  YDelta  ZDelta  shape
    0  0       0       0       circle Circle_Diameter=0.25
    1  12.833  0       0       circle Circle_Diameter=2.91

Gear "Nose landing gear"
  location (X Y Z) 6.5 0.35 -4.2, rotation 0 0 0
  symmetric about XZ
  bounding box size 1.5 1.20065 1.5
  bogie "New Gear": NumAcross=1 NumTandem=1 Spacing=0.55 Pitch=1.65 Symmetrical=0 XContactPt=0 YContactPt=0 TravelCompressed=1 TravelExtended=1 SteeringAngle=0 DiameterModel=1.5 WidthModel=0.5 PlyRating=20

Gear "Main landing gear"
  location (X Y Z) 26 -3.5 -4.2, rotation 0 0 0
  symmetric about XZ
  bounding box size 2 7.83333 2
  bogie "New Gear": NumAcross=1 NumTandem=1 Spacing=0.916667 Pitch=2.2 Symmetrical=0 XContactPt=0 YContactPt=0 TravelCompressed=1 TravelExtended=1 SteeringAngle=0 DiameterModel=2 WidthModel=0.833333 PlyRating=20

Fuselage "MLG Struts"
  location (X Y Z) 26 3 0, rotation 0 90 0
  symmetric about XZ
  bounding box size 0.83439 6.83439 3.75
  Design: Length=3.75
  cross sections:
    n  XLocPercent  YLocPercent  ZLocPercent  shape
    0  0            0            0            circle Circle_Diameter=0.5
    1  0.25         0            0            circle Circle_Diameter=0.25
    2  1            0            0            as above

Fuselage "Nose Gear Strut"
  location (X Y Z) 6.5 0 0, rotation 0 90 0
  bounding box size 0.83439 0.83439 3.75
  Design: Length=3.75
  cross sections:
    n  XLocPercent  YLocPercent  ZLocPercent  shape
    0  0            0            0            circle Circle_Diameter=0.5
    1  0.25         0            0            circle Circle_Diameter=0.25
    2  1            0            0            as above

Wing "Blended Wing Body"
  location (X Y Z) 0 0 0.327869, rotation 0 0 0
  symmetric about XZ
  bounding box size 44 11 4.18929
  totals: TotalSpan=11 TotalProjectedSpan=11 TotalChord=30.75 TotalArea=331 TotalAR=0.365559 MAC=32.4411
  root: chord 44, twist 0, ellipse Ellipse_Height=4.18929 Ellipse_Width=44
  sections:
    n  Span  Root_Chord  Tip_Chord  Area  Sweep  Sweep_Location  Dihedral  Twist  Twist_Location  tip airfoil
    1  2.5   44          32         95    62     0               0         0      0.25            NACA 4-series Camber=0 CamberLoc=0.2 ThickChord=0.065
    2  3     32          15         70.5  80     0               0         0      0.25            NACA 4-series Camber=0 CamberLoc=0.2 ThickChord=0.02

Custom "Box"
  location (X Y Z) 18 0 -0.92, rotation 0 0 0
  bounding box size 22.5 3.75 1.5
  Design: Height=1.5 Length=22.5 SquareFlag=0 Width=3.75
  custom script Box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

Stack "Left Air Intake Entrance"
  location (X Y Z) 18 -3.25 -0.68, rotation 0 0 0
  bounding box size 4 3.84821 2.00676
  cross sections:
    n  XDelta  YDelta  ZDelta  shape
    0  0       0       0       edit curve Width=3.5 Height=2 AbsoluteFlag=0 SymType=0 linear points (X Y): 0.5 0, 0.5 -0.5, 0 -0.5, -0.25274 -0.0123288, -0.507534 0.513699, -0.5 0.5, 0 0.5, 0.5 0.5, 0.5 0
    1  4       0       0       edit curve Width=3.25 Height=2 AbsoluteFlag=0 SymType=0 linear points (X Y): 0.649596 0.00359787, 0.643151 -0.50024, 0 -0.5, -0.302055 0.010072, -0.503425 0.480096, -0.125342 0.493526, 0.141781 0.493526, 0.639041 0.493526, 0.649596 0.00359787

Stack "Right Air Intake Entrance"
  location (X Y Z) 18 3.25 -0.68, rotation 0 0 0
  bounding box size 4 3.69569 2.0094
  cross sections:
    n  XDelta  YDelta  ZDelta  shape
    0  0       0       0       edit curve Width=3.5 Height=2 AbsoluteFlag=0 SymType=0 linear points (X Y): 0.499315 0.489041, 0.281507 0.0123288, 0 -0.5, -0.491096 -0.480822, -0.495205 0.0123288, -0.491096 0.480822, 0 0.5, 0.5 0.5, 0.499315 0.489041
    1  4       0       0       edit curve Width=3.25 Height=2 AbsoluteFlag=0 SymType=0 linear points (X Y): 0.503425 0.490839, 0.297945 -0.00333904, 0 -0.5, -0.599413 -0.505241, -0.599413 0.0105995, -0.595607 0.498174, -0.150329 0.498174, 0.0970478 0.498174, 0.503425 0.490839
